Ck := 47*10^-12
Lk := 1*10^-3
pi := 3.14
Fres := 1/(2*pi*sqrt(Ck*Lk))
Fres = 734499
Fres_80 := Fres*0.8
Fres_80 = 587599
C_new := 1/(4*pi^2*Fres_80^2*Lk)
C_new = 7.34375e-11
C_dop := C_new - Ck
C_dop = 2.64375e-11
Q := □  # error: This placeholder is empty.
