data := READPRN("C:\Users\mvideo\Desktop\Основы электроники (3 семестр)\Лабораторные\Лабораторная №3\data_lab3.csv")
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data =  # no stored result
Rb := 0.04
Is := 0.000001
m := 1.9
Ft := 0.02
Given
0.53303 == 0.000460309*Rb + ln((Is + 0.000460309)/Is)*m*Ft
0.51805 == 0.000260644*Rb + ln((Is + 0.000260644)/Is)*m*Ft
0.50951 == 0.000187882*Rb + ln((Is + 0.000187882)/Is)*m*Ft
0.49765 == 0.000119186*Rb + ln((Is + 0.000119186)/Is)*m*Ft
Diod := Minerr(Is, Rb, m, Ft)
Diod = [5.09042e-13; 1.45209; 1.56453; 0.0164998]
Idiod := 0, 10^-5 .. 0.023
Udiod(Idiod) := Idiod*Rb + m*Ft*ln((Idiod + Is)/Is)
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